<?xml version="1.0" encoding="ISO-8859-1"?>
<neuroml xmlns="http://www.neuroml.org/schema/neuroml2"
         xmlns:xsi="http://www.w3.org/2001/XMLSchema-instance"
         xsi:schemaLocation="http://www.neuroml.org/schema/neuroml2 https://raw.github.com/NeuroML/NeuroML2/development/Schemas/NeuroML2/NeuroML_v2beta4.xsd"
		 id="LeakConductance">

    <notes>Channel file containing passive Leak channel. </notes>

    <ionChannel id="LeakConductance" conductance="10pS" type="ionChannelPassive">
        <notes>Leak conductance</notes>
    </ionChannel>

</neuroml>
