<?xml version="1.0" encoding="ISO-8859-1"?>
<neuroml xmlns="http://www.neuroml.org/schema/neuroml2" xmlns:xsi="http://www.w3.org/2001/XMLSchema-instance" xsi:schemaLocation="http://www.neuroml.org/schema/neuroml2 https://raw.github.com/NeuroML/NeuroML2/development/Schemas/NeuroML2/NeuroML_v2beta4.xsd" id="MFGoCSynMult">

    <notes>simultaneous 5 Mossy-fibre to Golgi excitatory synapses, single exponential rise and double exponential decay</notes>

    <expThreeSynapse id="MFGoC_SynMult" erev="0 mV" tauRise="0.1 ms" gbase1="3.5 nS" tauDecay1="0.7 ms" gbase2="1 nS" tauDecay2="3.5 ms"/>

</neuroml>
