<?xml version="1.0" encoding="ISO-8859-1"?>
<neuroml xmlns="http://www.neuroml.org/schema/neuroml2" xmlns:xsi="http://www.w3.org/2001/XMLSchema-instance" xsi:schemaLocation="http://www.neuroml.org/schema/neuroml2 https://raw.github.com/NeuroML/NeuroML2/development/Schemas/NeuroML2/NeuroML_v2beta4.xsd" id="PFGoCSyn">

    <notes>Parallel-fibre to Golgi excitatory synapse, single exponential rise and double exponential decay</notes>

    <expTwoSynapse id="PFGoCSyn" erev="0 mV" tauRise="0.1 ms" gbase="0.67 nS" tauDecay="1.06 ms"/>

</neuroml>
