<?xml version="1.0" ?>
<Lems xmlns="http://www.neuroml.org/lems/0.7.3" xmlns:xsi="http://www.w3.org/2001/XMLSchema-instance" xsi:schemaLocation="http://www.neuroml.org/lems/0.7.3 https://raw.githubusercontent.com/LEMS/LEMS/development/Schemas/LEMS/LEMS_v0.7.3.xsd">
  <include file="inputGenerators.xml"/>
  <Component base_rate="70 Hz" id="OFF_070" time_off="4000 ms" time_on="2000 ms" transient_rate="0 Hz" type="spikeGeneratorSwitchPoisson"/>
  <Component base_rate="290 Hz" id="OFF_290" time_off="4000 ms" time_on="2000 ms" transient_rate="0 Hz" type="spikeGeneratorSwitchPoisson"/>
  <Component base_rate="110 Hz" id="OFF_110" time_off="4000 ms" time_on="2000 ms" transient_rate="0 Hz" type="spikeGeneratorSwitchPoisson"/>
  <Component base_rate="10 Hz" id="OFF_010" time_off="4000 ms" time_on="2000 ms" transient_rate="0 Hz" type="spikeGeneratorSwitchPoisson"/>
  <Component base_rate="50 Hz" id="OFF_050" time_off="4000 ms" time_on="2000 ms" transient_rate="0 Hz" type="spikeGeneratorSwitchPoisson"/>
  <Component base_rate="130 Hz" id="OFF_130" time_off="4000 ms" time_on="2000 ms" transient_rate="0 Hz" type="spikeGeneratorSwitchPoisson"/>
  <Component base_rate="230 Hz" id="OFF_230" time_off="4000 ms" time_on="2000 ms" transient_rate="0 Hz" type="spikeGeneratorSwitchPoisson"/>
  <Component base_rate="280 Hz" id="OFF_280" time_off="4000 ms" time_on="2000 ms" transient_rate="0 Hz" type="spikeGeneratorSwitchPoisson"/>
  <Component base_rate="270 Hz" id="OFF_270" time_off="4000 ms" time_on="2000 ms" transient_rate="0 Hz" type="spikeGeneratorSwitchPoisson"/>
  <Component base_rate="170 Hz" id="OFF_170" time_off="4000 ms" time_on="2000 ms" transient_rate="0 Hz" type="spikeGeneratorSwitchPoisson"/>
  <Component base_rate="30 Hz" id="OFF_030" time_off="4000 ms" time_on="2000 ms" transient_rate="0 Hz" type="spikeGeneratorSwitchPoisson"/>
  <Component base_rate="150 Hz" id="OFF_150" time_off="4000 ms" time_on="2000 ms" transient_rate="0 Hz" type="spikeGeneratorSwitchPoisson"/>
  <Component base_rate="250 Hz" id="OFF_250" time_off="4000 ms" time_on="2000 ms" transient_rate="0 Hz" type="spikeGeneratorSwitchPoisson"/>
  <Component base_rate="210 Hz" id="OFF_210" time_off="4000 ms" time_on="2000 ms" transient_rate="0 Hz" type="spikeGeneratorSwitchPoisson"/>
  <Component base_rate="190 Hz" id="OFF_190" time_off="4000 ms" time_on="2000 ms" transient_rate="0 Hz" type="spikeGeneratorSwitchPoisson"/>
  <Component base_rate="90 Hz" id="OFF_090" time_off="4000 ms" time_on="2000 ms" transient_rate="0 Hz" type="spikeGeneratorSwitchPoisson"/>
  <Component base_rate="100 Hz" id="OFF_100" time_off="4000 ms" time_on="2000 ms" transient_rate="0 Hz" type="spikeGeneratorSwitchPoisson"/>
  <Component base_rate="60 Hz" id="OFF_060" time_off="4000 ms" time_on="2000 ms" transient_rate="0 Hz" type="spikeGeneratorSwitchPoisson"/>
  <Component base_rate="160 Hz" id="OFF_160" time_off="4000 ms" time_on="2000 ms" transient_rate="0 Hz" type="spikeGeneratorSwitchPoisson"/>
  <Component base_rate="260 Hz" id="OFF_260" time_off="4000 ms" time_on="2000 ms" transient_rate="0 Hz" type="spikeGeneratorSwitchPoisson"/>
  <Component base_rate="120 Hz" id="OFF_120" time_off="4000 ms" time_on="2000 ms" transient_rate="0 Hz" type="spikeGeneratorSwitchPoisson"/>
  <Component base_rate="40 Hz" id="OFF_040" time_off="4000 ms" time_on="2000 ms" transient_rate="0 Hz" type="spikeGeneratorSwitchPoisson"/>
  <Component base_rate="220 Hz" id="OFF_220" time_off="4000 ms" time_on="2000 ms" transient_rate="0 Hz" type="spikeGeneratorSwitchPoisson"/>
  <Component base_rate="0 Hz" id="OFF_000" time_off="4000 ms" time_on="2000 ms" transient_rate="0 Hz" type="spikeGeneratorSwitchPoisson"/>
  <Component base_rate="140 Hz" id="OFF_140" time_off="4000 ms" time_on="2000 ms" transient_rate="0 Hz" type="spikeGeneratorSwitchPoisson"/>
  <Component base_rate="20 Hz" id="OFF_020" time_off="4000 ms" time_on="2000 ms" transient_rate="0 Hz" type="spikeGeneratorSwitchPoisson"/>
  <Component base_rate="80 Hz" id="OFF_080" time_off="4000 ms" time_on="2000 ms" transient_rate="0 Hz" type="spikeGeneratorSwitchPoisson"/>
  <Component base_rate="240 Hz" id="OFF_240" time_off="4000 ms" time_on="2000 ms" transient_rate="0 Hz" type="spikeGeneratorSwitchPoisson"/>
  <Component base_rate="180 Hz" id="OFF_180" time_off="4000 ms" time_on="2000 ms" transient_rate="0 Hz" type="spikeGeneratorSwitchPoisson"/>
  <Component base_rate="200 Hz" id="OFF_200" time_off="4000 ms" time_on="2000 ms" transient_rate="0 Hz" type="spikeGeneratorSwitchPoisson"/>
</Lems>
