<?xml version="1.0" ?>
<Lems xmlns="http://www.neuroml.org/lems/0.7.3" xmlns:xsi="http://www.w3.org/2001/XMLSchema-instance" xsi:schemaLocation="http://www.neuroml.org/lems/0.7.3 https://raw.githubusercontent.com/LEMS/LEMS/development/Schemas/LEMS/LEMS_v0.7.3.xsd">

  <include file="inputGenerators.xml"/>
  <Component base_rate="0 Hz" id="Transient_350" time_off="2050 ms" time_on="2000 ms" transient_rate="350 Hz" type="spikeGeneratorDelayPoisson"/>
  <Component base_rate="0 Hz" id="Transient_350_1s" time_off="1100 ms" time_on="1000 ms" transient_rate="350 Hz" type="spikeGeneratorDelayPoisson"/>
  <Component base_rate="0 Hz" id="Transient_100_1s_1s" time_off="2000 ms" time_on="1000 ms" transient_rate="100 Hz" type="spikeGeneratorDelayPoisson"/>
  <Component base_rate="0 Hz" id="Transient_350_2s_100ms" time_off="2100 ms" time_on="2000 ms" transient_rate="350 Hz" type="spikeGeneratorDelayPoisson"/>

  <Component base_rate="0 Hz" id="Del_20" time_off="1500 ms" time_on="500 ms" transient_rate="20 Hz" type="spikeGeneratorDelayPoisson"/>
  <Component base_rate="0 Hz" id="Del_40" time_off="1500 ms" time_on="500 ms" transient_rate="40 Hz" type="spikeGeneratorDelayPoisson"/>
  <Component base_rate="0 Hz" id="Del_80" time_off="1500 ms" time_on="500 ms" transient_rate="80 Hz" type="spikeGeneratorDelayPoisson"/>
  <Component base_rate="0 Hz" id="Del_100" time_off="1500 ms" time_on="500 ms" transient_rate="100 Hz" type="spikeGeneratorDelayPoisson"/>
  <Component base_rate="0 Hz" id="Del_150" time_off="1500 ms" time_on="500 ms" transient_rate="150 Hz" type="spikeGeneratorDelayPoisson"/>

  <Component base_rate="0 Hz" id="ON_140" time_off="4000 ms" time_on="2000 ms" transient_rate="140 Hz" type="spikeGeneratorSwitchPoisson"/>
  <Component base_rate="0 Hz" id="ON_120" time_off="4000 ms" time_on="2000 ms" transient_rate="120 Hz" type="spikeGeneratorSwitchPoisson"/>
  <Component base_rate="0 Hz" id="ON_160" time_off="4000 ms" time_on="2000 ms" transient_rate="160 Hz" type="spikeGeneratorSwitchPoisson"/>
  <Component base_rate="0 Hz" id="ON_080" time_off="4000 ms" time_on="2000 ms" transient_rate="80 Hz" type="spikeGeneratorSwitchPoisson"/>
  <Component base_rate="0 Hz" id="ON_220" time_off="4000 ms" time_on="2000 ms" transient_rate="220 Hz" type="spikeGeneratorSwitchPoisson"/>
  <Component base_rate="0 Hz" id="ON_000" time_off="4000 ms" time_on="2000 ms" transient_rate="0 Hz" type="spikeGeneratorSwitchPoisson"/>
  <Component base_rate="0 Hz" id="ON_100" time_off="4000 ms" time_on="2000 ms" transient_rate="100 Hz" type="spikeGeneratorSwitchPoisson"/>
  <Component base_rate="0 Hz" id="ON_280" time_off="4000 ms" time_on="2000 ms" transient_rate="280 Hz" type="spikeGeneratorSwitchPoisson"/>
  <Component base_rate="0 Hz" id="ON_040" time_off="4000 ms" time_on="2000 ms" transient_rate="40 Hz" type="spikeGeneratorSwitchPoisson"/>
  <Component base_rate="0 Hz" id="ON_180" time_off="4000 ms" time_on="2000 ms" transient_rate="180 Hz" type="spikeGeneratorSwitchPoisson"/>
  <Component base_rate="0 Hz" id="ON_200" time_off="4000 ms" time_on="2000 ms" transient_rate="200 Hz" type="spikeGeneratorSwitchPoisson"/>
  <Component base_rate="0 Hz" id="ON_020" time_off="4000 ms" time_on="2000 ms" transient_rate="20 Hz" type="spikeGeneratorSwitchPoisson"/>
  <Component base_rate="0 Hz" id="ON_070" time_off="4000 ms" time_on="2000 ms" transient_rate="70 Hz" type="spikeGeneratorSwitchPoisson"/>
  <Component base_rate="0 Hz" id="ON_060" time_off="4000 ms" time_on="2000 ms" transient_rate="60 Hz" type="spikeGeneratorSwitchPoisson"/>
  <Component base_rate="0 Hz" id="ON_150" time_off="4000 ms" time_on="2000 ms" transient_rate="150 Hz" type="spikeGeneratorSwitchPoisson"/>
  <Component base_rate="0 Hz" id="ON_270" time_off="4000 ms" time_on="2000 ms" transient_rate="270 Hz" type="spikeGeneratorSwitchPoisson"/>
  <Component base_rate="0 Hz" id="ON_250" time_off="4000 ms" time_on="2000 ms" transient_rate="250 Hz" type="spikeGeneratorSwitchPoisson"/>
  <Component base_rate="0 Hz" id="ON_260" time_off="4000 ms" time_on="2000 ms" transient_rate="260 Hz" type="spikeGeneratorSwitchPoisson"/>
  <Component base_rate="0 Hz" id="ON_090" time_off="4000 ms" time_on="2000 ms" transient_rate="90 Hz" type="spikeGeneratorSwitchPoisson"/>
  <Component base_rate="0 Hz" id="ON_170" time_off="4000 ms" time_on="2000 ms" transient_rate="170 Hz" type="spikeGeneratorSwitchPoisson"/>
  <Component base_rate="0 Hz" id="ON_240" time_off="4000 ms" time_on="2000 ms" transient_rate="240 Hz" type="spikeGeneratorSwitchPoisson"/>
  <Component base_rate="0 Hz" id="ON_010" time_off="4000 ms" time_on="2000 ms" transient_rate="10 Hz" type="spikeGeneratorSwitchPoisson"/>
  <Component base_rate="0 Hz" id="ON_130" time_off="4000 ms" time_on="2000 ms" transient_rate="130 Hz" type="spikeGeneratorSwitchPoisson"/>
  <Component base_rate="0 Hz" id="ON_290" time_off="4000 ms" time_on="2000 ms" transient_rate="290 Hz" type="spikeGeneratorSwitchPoisson"/>
  <Component base_rate="0 Hz" id="ON_110" time_off="4000 ms" time_on="2000 ms" transient_rate="110 Hz" type="spikeGeneratorSwitchPoisson"/>
  <Component base_rate="0 Hz" id="ON_210" time_off="4000 ms" time_on="2000 ms" transient_rate="210 Hz" type="spikeGeneratorSwitchPoisson"/>
  <Component base_rate="0 Hz" id="ON_190" time_off="4000 ms" time_on="2000 ms" transient_rate="190 Hz" type="spikeGeneratorSwitchPoisson"/>
  <Component base_rate="0 Hz" id="ON_030" time_off="4000 ms" time_on="2000 ms" transient_rate="30 Hz" type="spikeGeneratorSwitchPoisson"/>
  <Component base_rate="0 Hz" id="ON_230" time_off="4000 ms" time_on="2000 ms" transient_rate="230 Hz" type="spikeGeneratorSwitchPoisson"/>
  <Component base_rate="0 Hz" id="ON_050" time_off="4000 ms" time_on="2000 ms" transient_rate="50 Hz" type="spikeGeneratorSwitchPoisson"/>

  <Component id="MF1" base_rate="5 Hz"  tstart="1500ms" on_period="1500 ms" off_period="1500ms" rate1="10 Hz" rate2="20 Hz" rate3="30 Hz" rate4="40 Hz" rate5="50 Hz" rate6="60 Hz" type="spikeGeneratorMultLevels"/>
  <Component id="MF2" base_rate="5 Hz" tstart="1500ms" on_period="1000 ms" off_period="2000ms" rate1="10 Hz" rate2="20 Hz" rate3="30 Hz" rate4="40 Hz" rate5="50 Hz" rate6="60 Hz" type="spikeGeneratorMultLevels"/>
  <Component id="MF3" base_rate="5 Hz"  tstart="1500ms" on_period="500 ms" off_period="2500ms" rate1="20 Hz" rate2="40 Hz" rate3="60 Hz" rate4="80 Hz" rate5="60 Hz" rate6="30 Hz" type="spikeGeneratorMultLevels"/>
  <Component id="MF4" base_rate="5 Hz" tstart="2500ms" on_period="500 ms" off_period="2500ms" rate1="20 Hz" rate2="40 Hz" rate3="40 Hz" rate4="60 Hz" rate5="60 Hz" rate6="60 Hz" type="spikeGeneratorMultLevels"/>
  <Component id="MF5" base_rate="30 Hz"  tstart="1500ms" on_period="1500 ms" off_period="1500ms" rate1="15 Hz" rate2="12 Hz" rate3="10 Hz" rate4="8 Hz" rate5="5 Hz" rate6="2 Hz" type="spikeGeneratorMultLevels"/>

  <Component id="PF1" base_rate="2 Hz"  tstart="1500ms" on_period="1500 ms" off_period="1500ms" rate1="10 Hz" rate2="20 Hz" rate3="30 Hz" rate4="40 Hz" rate5="50 Hz" rate6="60 Hz" type="spikeGeneratorMultLevels"/>
  <Component id="PF2" base_rate="2 Hz" tstart="1500ms" on_period="1000 ms" off_period="2000ms" rate1="10 Hz" rate2="20 Hz" rate3="30 Hz" rate4="40 Hz" rate5="50 Hz" rate6="60 Hz" type="spikeGeneratorMultLevels"/>
  <Component id="PF3" base_rate="2 Hz"  tstart="1500ms" on_period="500 ms" off_period="2500ms" rate1="20 Hz" rate2="40 Hz" rate3="60 Hz" rate4="80 Hz" rate5="60 Hz" rate6="30 Hz" type="spikeGeneratorMultLevels"/>
  <Component id="PF4" base_rate="2 Hz" tstart="2500ms" on_period="500 ms" off_period="2500ms" rate1="20 Hz" rate2="40 Hz" rate3="40 Hz" rate4="60 Hz" rate5="60 Hz" rate6="60 Hz" type="spikeGeneratorMultLevels"/>
  <Component id="PF5" base_rate="25 Hz"  tstart="1500ms" on_period="1500 ms" off_period="1500ms" rate1="12 Hz" rate2="10 Hz" rate3="8 Hz" rate4="5 Hz" rate5="2 Hz" rate6="1 Hz" type="spikeGeneratorMultLevels"/>

</Lems>
